#----初始化----
units       metal    # 单位制
dimension   3        # 维度
boundary    p p p    # 边界条件
atom_style  atomic   # 原子类型
timestep  0.001
neighbor  0.3 bin
variable T0 equal 300 #室温
variable T1 equal 973 #退火温度

#----模拟区域信息设置----
read_restart restart.mcmd.4300000

reset_timestep 4300000

#---模拟环境中的原子信息
mass 1  47.867  #Ti
mass 2  50.9415  #V
mass 3  180.9  #Ta

#----力场/势函数---
pair_style nep
pair_coeff * * TiVTa.txt Ti V Ta

#设置输出信息/格式
thermo 1000
thermo_style custom step lx ly lz press pxx pyy pzz pe temp etotal

#----MC/MD退火过程----
#MC (swap atoms)
fix 1 all nvt temp ${T1} ${T1} 0.1
fix 2 all atom/swap 100 10 223344 ${T1}  types 1 2
fix 3 all atom/swap 100 10 223344 ${T1}  types 1 3
fix 5 all atom/swap 100 10 223344 ${T1}  types 2 3
dump 2 all custom 5000 swaped.data id type x y z
restart 100000 restart.mcmd
run 500000000
